// SBML level 2 version 4

function Rate_Law_for_CYLD_inhibition(k_cyld, CYLD, IKK_active)
  k_cyld*CYLD*IKK_active;
end

function Rate_Law_for_NFkB_Import(k_import, IKK_active, NFkB_cyt)
  k_import*IKK_active*NFkB_cyt;
end

function Rate_Law_for_A20_feedback_inhibition(A20_feedback_strength, A20, IKK_active)
  A20_feedback_strength*A20*IKK_active;
end

model New_Model()

  // Compartments:
  compartment Cytoplasm = 1;
  compartment Nucleus = 1;

  // Species:
  species $Signal in Cytoplasm = 1;
  species A20 in Cytoplasm = 0;
  species IKK_active in Cytoplasm = 0;
  species NFkB_nuc in Cytoplasm = 0;
  species NFkB_cyt in Cytoplasm = 1;
  species Output in Cytoplasm = 0;
  species CYLD in Cytoplasm = 1;

  // Parameters:
  A20_feedback_strength = 0.02;

  // Reactions:
  Activation: $Signal => IKK_active; Cytoplasm*Activation_k1*Signal;
    Activation_k1 = 0.1;
  NFkB_Import: NFkB_cyt => NFkB_nuc; Cytoplasm*Rate_Law_for_NFkB_Import(k_import, IKK_active, NFkB_cyt);  // modifiers: IKK_active
    k_import = 5;
  A20_production: NFkB_nuc => NFkB_nuc + A20; Cytoplasm*A20_production_k1*NFkB_nuc;
    A20_production_k1 = 0.1;
  A20_feedback_inhibition: IKK_active => ; Cytoplasm*Rate_Law_for_A20_feedback_inhibition(A20_feedback_strength, A20, IKK_active);  // modifiers: A20
  A20_degradation: A20 => ; Cytoplasm*A20_degradation_k1*A20;
    A20_degradation_k1 = 0.05;
  NFkB_Export: NFkB_nuc => NFkB_cyt; Cytoplasm*NFkB_Export_k1*NFkB_nuc;
    NFkB_Export_k1 = 0.5;
  Output_production: NFkB_nuc => NFkB_nuc + Output; Cytoplasm*Output_production_k1*NFkB_nuc;
    Output_production_k1 = 0.5;
  CYLD_production: NFkB_nuc => NFkB_nuc + CYLD; Cytoplasm*CYLD_production_k1*NFkB_nuc;
    CYLD_production_k1 = 0.05;
  CYLD_degradation: CYLD => ; Cytoplasm*CYLD_degradation_k1*CYLD;
    CYLD_degradation_k1 = 0.05;
  CYLD_inhibition: IKK_active => ; Rate_Law_for_CYLD_inhibition(k_cyld, CYLD, IKK_active);  // modifiers: CYLD
    k_cyld = 0.02;
  Output_degradation: Output => ; Cytoplasm*Output_degradation_k1*Output;
    Output_degradation_k1 = 0.2;

  // Unit definitions:
  unit length = metre;
  unit area = metre^2;
  unit volume = litre;
  unit time = second;
  unit substance = mole;
end
